f(t, α, β) := Γ(α + β)*t^(α - 1)*(1 - t)^(β - 1)/(Γ(α)*Γ(β))
# [plot: f(t, 2, 8), f(t, 5, 5), f(t, 8, 2) vs t]
F(t, α, β) := integral(f(t, α, β), t = 0 .. t)
# [plot: F(t, 2, 8), F(t, 5, 5), F(t, 8, 2) vs t]
α1(α, β) := integral(t*f(t, α, β), t = 0 .. 1)
α2(α, β) := integral(t^2*f(t, α, β), t = 0 .. 1)
α3(α, β) := integral(t^3*f(t, α, β), t = 0 .. 1)
M_1(α, β) := α1(α, β)
M_2(α, β) := α/(α + β)
# [plot: M_1(2, β), M_2(2, β) vs β]
M_1(5, 5) = 0.5
M_2(5, 5) = 0.5
M_e(α, β) := (α - 1/3)/(α + β - 2/3)
M_0(α, β) := (α - 1)/(α + β - 2)
M_0(2, 8) = 0.125
M_e(2, 8) = 0.178571
M_0(5, 5) = 0.5
M_e(5, 5) = 0.5
M_0(8, 2) = 0.875
M_e(8, 2) = 0.821429
D1(α, β) := α2(α, β) - α1(α, β)^2
D2(α, β) := α*β/((α + β)^2*(α + β + 1))
D1(5, 5) = 0.0227273
D2(5, 5) = 0.0227273
# [plot: D1(2, β), D2(2, β) vs β]
Cp(α, β) := sqrt(D1(α, β))
Cp(2, 8) = 0.120605
Cp(5, 5) = 0.150756
Cp(8, 2) = 0.120605
μ3(b, c) := 2*α1(b, c)^3 - 3*α1(b, c)*α2(b, c) + α3(b, c)
S(α, β) := 2*(β - α)*sqrt(α + β + 1)/((α + β + 2)*sqrt(α*β))
# [plot: S(2, β) vs β]
