f(t, α, β) := Γ(α + β)*t^(α - 1)*(1 - t)^(β - 1)/(Γ(α)*Γ(β))
# [plot: f(t, 2, 8), f(t, 5, 5), f(t, 8, 2) vs t]
F(t, α, β) := integral(f(t, α, β), t = 0 .. t)
# [plot: F(t, 2, 8), F(t, 5, 5), F(t, 8, 2) vs t]
α1(α, β) := integral(t*f(t, α, β), t = 0 .. 1)
α2(α, β) := integral(t^2*f(t, α, β), t = 0 .. 1)
α3(α, β) := integral(t^3*f(t, α, β), t = 0 .. 1)
M_1(α, β) := α1(α, β)
M_2(α, β) := α/(α + β)
M_1(2, 8) = 0.2
M_2(2, 8) = 0.2
M_1(5, 5) = 0.5
M_2(5, 5) = 0.5
M_1(8, 2) = 0.8
M_2(8, 2) = 0.8
D_1(α, β) := α2(α, β) - α1(α, β)^2
D_2(α, β) := α*β/((α + β)^2*(α + β + 1))
D_1(2, 8) = 0.0145455
D_2(2, 8) = 0.0145455
D_1(5, 5) = 0.0227273
D_2(5, 5) = 0.0227273
D_1(8, 2) = 0.0145455
D_2(8, 2) = 0.0145455
Cp(α, β) := sqrt(D_1(α, β))
Cp1(α, β) := sqrt(D_2(α, β))
Cp(2, 8) = 0.120605
Cp1(2, 8) = 0.120605
Cp(5, 5) = 0.150756
Cp1(5, 5) = 0.150756
Cp(8, 2) = 0.120605
Cp1(8, 2) = 0.120605
n := 1000
a := 0
b := 1
i := 1 .. n - 1
V := runif(n, a, b)
G1[i] := root(F(x, 2, 8) - V[i], x, 0, 1)
x1 := sort(G1)
G2[i] := root(F(x, 5, 5) - V[i], x, 0, 1)
x2 := sort(G2)
G3[i] := root(F(x, 8, 2) - V[i], x, 0, 1)
x3 := sort(G3)
# [plot: x1[i], x2[i], x3[i] vs i]
bin := 50
lower1 := floor(min(x1))
upper1 := ceil(max(x1))
h1 := (upper1 - lower1)/bin
lower2 := floor(min(x2))
upper2 := ceil(max(x2))
h2 := (upper2 - lower2)/bin
lower3 := floor(min(x3))
upper3 := ceil(max(x3))
h3 := (upper3 - lower3)/bin
int1[i] := lower1 + h1*i
int2[i] := lower2 + h2*i
int3[i] := lower3 + h3*i
t1 := hist(int1, x1)/(n*h1)
t2 := hist(int2, x2)/(n*h2)
t3 := hist(int3, x3)/(n*h3)
# [plot: t1, f(x, 2, 8) vs int1, x]
# [plot: t2, f(x, 5, 5) vs int2, x]
# [plot: t3, f(x, 8, 2) vs int3, x]
