f(t, α, β) := Γ(α + β)*t^(α - 1)*(1 - t)^(β - 1)/(Γ(α)*Γ(β))
# [plot: f(t, 2, 8), f(t, 5, 5), f(t, 8, 2) vs t]
F(t, α, β) := integral(f(t, α, β), t = 0 .. t)
# [plot: F(t, 2, 8), F(t, 5, 5), F(t, 8, 2) vs t]
n := 1000
a := 0
b := 1
i := 1 .. n - 1
h := 0.5
V := runif(n, a, b)
G1[i] := root(F(t, 2, 8) - V[i], t, 0, 1)
X1 := sort(G1)
G2[i] := root(F(t, 5, 5) - V[i], t, 0, 1)
X2 := sort(G2)
G3[i] := root(F(t, 8, 2) - V[i], t, 0, 1)
X3 := sort(G3)
N1(t) :=
    i ← 0
    while t > X1[i]
        i ← i + 1
    n - i
N2(t) :=
    i ← 0
    while t > X2[i]
        i ← i + 1
    n - i
N3(t) :=
    i ← 0
    while t > X3[i]
        i ← i + 1
    n - i
T1max := round(max(X1)/h, 0)
T2max := round(max(X2)/h, 0)
i1 := 0 .. T1max
i2 := 0 .. T2max
T1[i1] := i1*h
T2[i2] := i2*h
i1 := 0 .. T1max - 1
i2 := 0 .. T2max - 1
T3max := round(max(X3)/h, 0)
i3 := 0 .. T3max
T3[i3] := i3*h
i3 := 0 .. T3max - 1
P1[i1] := N1(T1[i1])/n
P2[i2] := N2(T2[i2])/n
P3[i3] := N3(T3[i3])/n
P1[T1max] := 0
P2[T2max] := 0
P3[T3max] := 0
P(t, α, β) := 1 - F(t, α, β)
# [plot: P(t, 2, 8), P(t, 5, 5), P(t, 8, 2) vs t]
# [plot: P(t, 2, 8), P(t, 5, 5), P(t, 8, 2) vs t]
